//--------------------------------------------------------------------------------------------------//
// Configuração tensão de base.

Set Voltagebases=[115, 4.16, .48, .69]
CalcVoltageBases
BusCoords IEEE13Node_BusXY.csv
New energymeter.m1 line.650632 1

//--------------------------------------------------------------------------------------------------//
